# Example Building  Geometry
# The 30 story residential building is located in Vancouver BC, on soil site class C. There are five stories below grade and a mechanical penthouse on the top of the building.
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# Slab thicknesses
t_slab1 := 190 mm = 0.19 m
t_slab2 := 250 mm
# Story heights:
H_PHcl := 4880 mm
H_PH := H_PHcl + t_slab1 = 5.07 m
H_Typcl := 2590 mm
H_Typ := H_Typcl + t_slab1 = 2.78 m
H_1cl := 4270 mm
H_1 := H_1cl + t_slab1 = 4.46 m
H_P1cl := 4270 mm
H_P1 := H_P1cl + t_slab2 = 4.52 m
H_P2toP5cl := 2750 mm
H_P2toP5 := H_P2toP5cl + t_slab2 = 3 m
# Total height above grade:
H_n := H_PH + 29*H_Typ + H_1 = 90.15 m
# Total height including basement:
H_T := H_PH + 29*H_Typ + H_1 + H_P1 + 4*H_P2toP5 = 106.67 m
# Column Dimensions:
Col_b := 1250 mm
Col_d := 250 mm
# Concrete strengths:
fpc_P5to10 := 45 MPa
fpc_11to20 := 35 MPa
fpc_21toPH := 30 MPa
H_P2toP5 + H_P1 = 7.52 m
# Coupling beam depths:
# Lengths
L_CBst := 1120 mm
L_CBlob := 1320 mm
# Stair opening:
h_stairs := 2085 mm
d_1st := H_1cl - h_stairs + t_slab1 = 2.375 m
d_2toPH := H_Typcl - h_stairs + t_slab1 = 0.695 m
d_PHst := H_PHcl - h_stairs + t_slab1 = 2.985 m
d_P1st := H_P1cl - h_stairs + t_slab2 = 2.435 m
d_P2toP5st := H_P2toP5cl - h_stairs + t_slab2 = 0.915 m
# Elevator lobby:
h_lobby := 2185 mm
d_1lob := H_1cl - h_lobby + t_slab1 = 2.275 m
d_2toPHlob := H_Typcl - h_lobby + t_slab1 = 0.595 m
d_PHlob := H_PHcl - h_lobby + t_slab1 = 2.885 m
d_P1lob := H_P1cl - h_lobby + t_slab2 = 2.335 m
d_P2toP5lob := H_P2toP5cl - h_lobby + t_slab2 = 0.815 m
# Wall dimensions:
# All Walls:
# Length of wall:
L_w := 8940 mm
# Thickness of flange:
tf := 710 mm
# Wall 1:
# Length of flange:
B_w1 := 1015 mm
# Thickness of web:
tw_w1 := 405 mm
# Wall 2:
# Length of flange:
B_w2 := 2590 mm
# Thickness of web:
tw_w2 := 305 mm
# Wall 3:
# Length of flange:
B_w3 := 1675 mm
# Thickness of web:
tw_w3 := 355 mm
# Approximate trib area
# Wall:
Trib_W1 := ((26 m - 8940 mm)/2 + 8940 mm)*((26 m - 7720 mm)/2 + 7720 mm) = 294.544 m^2
# Seismic Hazard (Design Spectrum)
# The design spectrum represents the seismic hazard based on the buildings soil condition and location (location to faults etc.). This building is assumed ot be located in downtown Vancouver BC, site class C.
S_a0.1 := 0.686
S_a0.2 := 0.848
S_a0.3 := 0.852
S_a0.5 := 0.751
S_pga := 0.369
S_a1.0 := 0.425
S_a2.0 := 0.257
S_a5.0 := 0.0804
S_a10.0 := 0.0285
S_pgv := 0.553
# According to the NBCC, the response spectrum values are adjusted to account for site class conditions, for site class C use the following conditions:
F_0.2 := 1.0
F_0.5 := 1.0
F_1.0 := 1.0
F_2.0 := 1.0
F_5.0 := 1.0
F_10.0 := 1.0
F_a := F_0.2
F_v := F_1.0
# Importance Factor for a Normal importance category:
I_E := 1.0
# Using the equations from NBCC 4.1.8.4 the values are adjusted:
T_g := [0; 0.2; 0.5; 1; 2; 5; 10]*s
S_g := [
    max(F_0.2*S_a0.2, F_0.5*S_a0.5);
    max(F_0.2*S_a0.2, F_0.5*S_a0.5);
    F_0.5*S_a0.5;
    F_1.0*S_a1.0;
    F_2.0*S_a2.0;
    F_5.0*S_a5.0;
    F_10.0*S_a10.0
] = [0.848; 0.848; 0.751; 0.425; 0.257; 0.0804; 0.0285]
S_0.2 := S_g[1]
S_0.5 := S_g[2]
S_1.0 := S_g[3]
S_2.0 := S_g[4]
S_5.0 := S_g[5]
S_10.0 := S_g[6]
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# 4.1.8.7 Methods of Analysis
# According to NBCC 4.1.8.7 buildings with a height greater than 60m or a fundmental period greater than 2s require dynamic anlysis. Therefore, a elastic cracked model was buult in ETABS.
# ETABS MODEL
# Model was created in etabs. Podium floor uses a semi-rigid diaphragm constraint. The grade and below grade slabs are 250mm thick, elastic membranes with a semi-rigid diaphragm constraint. The above grade slabs are 190mm with a rigid diaphragm constraint. Column elements are assumed to not contributed to the lateral stiffness and therefore have moment relesases at every story.
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# Cracking properties:
# For diagonally reinforced coupling beams:
I_crCB := 0.25*I_CB  # disabled
A_crCB := 0.45*A_CB  # disabled
# For walls, the area is cracked the same as the moment of inertia, therefore adjust the modulus of elasticity
I_crWall := α_w*I_wall  # disabled
A_crWall := α_w*A_wall  # disabled
# Where:
α_w := min(max*(1 - 0.35*(R_d*R_o/γ_w - 1), 0.5), 1)  # disabled
# Where γw is the overstrength and can be taken
# as Ro
# For East-West Direction Overstrength and ductility are (Assuming DOC > 0.66 - > check this):
R_dx := 4
# and
R_ox := 1.7
# Cracked value is:
α_wx := min(max(1 - 0.35*(R_dx - 1), 0.5), 1) = 0.5
# For North-South Direction Overstrength and ductility are:
R_dy := 3.5
# and
R_oy := 1.6
# Cracked value is:
α_wy := min(max(1 - 0.35*(R_dy - 1), 0.5), 1) = 0.5
# Natural frequencies:
# Modal analysis showed:
T_ETABSx := 5.864 s
T_ETABSy := 4.567 s
# The NBCC gives an emperical formula to estimate the period of the structure. NBCC period is estimated as:
# NBCC emperical formula for period:
T_a := 0.05 s*(H_n/m)^(3/4) = 1.46283 s  # 4.1.8.11 3) c
# where Hn was taken as
H_n = 90.15 m  # which does not include the basement levels
# . If the dynamic period is > than 2xNBCC use the NBCC estimate (4.1.8.11 3.d.iii):
T_x := min(T_ETABSx, 2*T_a) = 2.92566 s
T_y := min(T_ETABSy, 2*T_a) = 2.92566 s
# Using response spectrum analysis in Etabs, gives the following base shears:
V_etabsx := 16322 kN
V_etabsy := 22410 kN
# NBCC 2015 Base Shear
# Seismic weight:
W_seismic := 153193 kN
# Spectral acceleration
S_Tax := linterp(T_g, S_g, T_x) = 0.202509
S_Tay := linterp(T_g, S_g, T_y) = 0.202509
# Factors from the NBCC
# Table 4.1.8.11: Higher mode factors
S_0.2/S_5.0 = 10.5473
# X Direction:
T_x = 2.92566 s
M_v2.0x := linterp([5; 20], [1; 1], S_0.2/S_5.0) = 1
M_v5.0x := linterp([5; 20], [1; 1.08], S_0.2/S_5.0) = 1.02959
# Interpolation should be done on the product S(Ta)Mv  --  See note (2) of Table 4.1.8.11
M_vx := linterp([2 s; 5 s], [S_2.0*M_v2.0x; S_5.0*M_v5.0x], T_x)/S_Tax = 1.00362
# Y Direction:
T_y = 2.92566 s
# Old formula, for reference
M_vx := linterp([2 s; 5 s], [M_v2.0x; M_v5.0x], T_x)  # disabled
M_v2.0y := linterp([5; 20], [1; 1.18], S_0.2/S_5.0) = 1.06657
M_v5.0y := linterp([5; 20], [1.25; 2.3], S_0.2/S_5.0) = 1.63831
M_vy := linterp([2 s; 5 s], [M_v2.0y; M_v5.0y], T_y)  # disabled
M_vy := linterp([2 s; 5 s], [S_2.0*M_v2.0y; S_5.0*M_v5.0y], T_y)/S_Tay = 1.13661
# Base shear from the NBCC
V_ax := S_Tax*M_vx*I_E*W_seismic/(R_ox*R_dx) = 4578.74 kN
V_ay := S_Tay*M_vy*I_E*W_seismic/(R_oy*R_dy) = 6296.6 kN
V_maxx := M_vx*I_E*W_seismic/(R_ox*R_dx)*max(2/3*S_0.2, S_0.5)
V_maxy := M_vy*I_E*W_seismic/(R_oy*R_dy)*max(2/3*S_0.2, S_0.5)
S_4.0 := linterp(T_g, S_g, 4 s) = 0.139267
V_minx := M_vx*S_4.0*I_E*W_seismic/(R_ox*R_dx) = 3148.82 kN
V_miny := M_vy*S_4.0*I_E*W_seismic/(R_oy*R_dy) = 4330.2 kN
V_x := min(max(V_ax, V_minx), V_maxx) = 4578.74 kN
V_y := min(max(V_ay, V_miny), V_maxy) = 6296.6 kN
# Determine Scaling factor
Fact_Vex := min(1, max(2/3*S_0.2, S_0.5)*1/linterp(T_g, S_g, T_x)) = 1
Fact_Vey := min(1, max(2/3*S_0.2, S_0.5)*1/linterp(T_g, S_g, T_x)) = 1
V_dx := max(Fact_Vex*V_etabsx*I_E/(R_ox*R_dx), 0.8*V_x) = 3662.99 kN
V_dy := max(Fact_Vey*V_etabsy*I_E/(R_oy*R_dy), 0.8*V_y) = 5037.28 kN
# Scaling factor:
SF_x := V_dx/V_etabsx = 0.224421
SF_y := V_dy/V_etabsy = 0.224778
V_etabsx = 16322 kN
# Interstory drift ratios (ISDR)
# Design interstory drifts are determined by the following:
ISDR_d := ISDR_Etabs*R_d*R_o*SF/I_e  # disabled
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22.45 m - 72*m/2 = -13.55 m
# Displacements
# Design interstory drifts are determined by the following:
Δ_d := Δ_CQC*R_d*R_o*SF/I_e  # disabled
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# Wall Total Forces
# Design interstory drifts are determined by the following:
# Degree of Coupling
# The minimum limit for coupling is 0.66:
DoC := T*d_w/(M_1 + M_2 + T*d_w)  # disabled
# Distance between centroids are:
# Wall 1:
x_cW1 := 3.724 m
# Wall 2:
x_cW2 := 44.4 m
# Wall 3:
x_cW3 := 3.2076 m
# From RSA the max forces at ground level are:
# Max Moment in W1:
M_1 := 3775 kN*m
# Max Axial in W1:
P_1 := 18430 kN
# Max Moment in W2:
M_2 := 19550 kN*m
# Max Axial in W2:
P_2 := 869 kN
# Max Moment in W3:
M_3 := 8144 kN*m
# Max Axial in W3:
P_3 := 19080 kN
# Degree of coupling beam:
DoC := (x_cW1*P_1 + x_cW2*P_2 + x_cW3*P_3)/(M_1 + M_2 + M_3 + (x_cW1*P_1 + x_cW2*P_2 + x_cW3*P_3)) = 0.842566
# Degree of coupling is 73.5% which is greater than 66%, therefore the assumptions of Rd = 4 and Ro =1.7 is OK
# The CWDS degree of coupling is: 79%
# Old Calculation
# Building Geometry:
b := 24 m
h := 24 m
tf := 0.5 m
tw := 0.5 m
o := 2 m
hw := 8 m
bw := 3 m
# Slab thickness:
t_slab := 0.25 m
# Clear Cover:
cover := 0.035 m
# Depth of Coupling beams:
d_1 := 1 m
d_2_15 := 1 m
# Square column dimensions:
b_column := 0.55 m
# Stories:
H_1 := 4.85 m
H_2_15 := 3.65 m
H_tot := H_1 + 14*H_2_15
# Number of floors:
n_f := 15
# Elevations:
EL :=
    for ii ∈ 0 .. 15
        EL[ii] ← 0 if ii < 1
        EL[ii] ← H_1 + H_2_15*(ii - 1) otherwise
    EL
# Material strength
# concrete strength:
fpc := 40 MPa
ϕ_c := 0.65
ε_cu := 0.0035
# steel strength:
fy := 400 MPa
ϕ_s := 0.85
# Distributed loads:
λ := 1
# Superimposed dead load:
load_SID := 1050 Pa
# Density:
load_density := 24*kN/m^3
I_E := 1
# Live Loads:
load_LL := 2400 Pa
# Design Demands (Elastic Model)
# For the design demands, the CWDS uses an OpenSees elastic model while this example uses an ETABs model. Below summerises the differences between the models.
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# Etabs Model:
# - Coupling beams: Timoshanko Elastic BC, embedded
# rigid links to account for drilling degrees of freedom
# - Columns: Elastic BC
# - Walls: Thin Shell formulation
# - Slab: Rigid diaphragm constraint
# - Restraints: Pinned at base
# - Masses/Loads: Calculated by tributary area and
# lumped at nodes
# OpenSees Model:
# - Coupling beams: Timoshanko Elastic BC
# - Columns: Elastic BC
# - Walls: Flanges and web modelled withTimoshanko
# Elastic BC elements attached with rigid links
# - Slab: Attached with rigid truss elements
# - Restraints: Pinned at base
# - Masses/Loads: Calculated by tributary area and
# lumped at nodes
# Calculating Demands
# The SFRS must be designed to withstand a series of load combinations outline by the NBCC
# Table 4.1.3.2A.
# This design ignores the effects of snow load, as the snow hazards are low.
# Case 1: | 1.4DL
# Case 2: | (1.25DL or 0.9DL) + 1.5LL + (0.5SLL or 0.4W)
# Case 3: | (1.25DL or 0.9DL) + 1.5S + (0.5LL or 0.4W)
# Case 4: | (1.25DL or 0.9DL) + 1.4W + (0.5LL or 0.5S)
# Case 5: | 1.0DL + 1.0E + (0.5L or 0.25S) | <= typically the governing case
# Before we start designing each component we need to determine the demands due to:
# DL = Dead load (self weight + superimposed dead)
# LL = Live Load (based on occupancy)
# W = Wind Load (static or dynamic analysis)
# SL = Snow Load (based on location)
# E = Earthquake load (dynamic analysis, based on location, ha
# To obtain these design demands a series of analysis are conducted on structural models. The structural models are built using the following:
# - Rigid diaphragm constraints
# - Elastic cracked elements. Different cracked values for wind and earthquake
# Gravity Loads:
# - DL-Dead Load uses tributary area for each component for the distributed loads and the self weight of each component
# - LL-Live Loads uses tributary area and reduction in the live load as permitted by NBCC 4.1.5.8
# Response Spectrum Analysis:
# - RSA-X: Independantly using sufficient modes to have 90% mass participation
# - RSA-X-pT: RSA in the Y direction with positive eccentricity
# - RSA-X-nT: RSA in the Y direction with negative eccentricity
# - RSA-Y: Independantly using sufficient modes to have 90% mass participation
# - RSA-Y-pT: RSA in the Y direction with positive eccentricity
# - RSA-Y-nT: RSA in the Y direction with negative eccentricity
# Wind Analysis:
# - AX -
# - AY -
# - BX -
# - BY -
# - C -
# - D -
# Gravity Loads
# Tributary Area
# Tributary area calculates the amount of load on the slab that will be transfered to each structural component
Trib_cornercol := (b/(2*3))*(h/(2*3)) = 16 m^2
Trib_middlecol := (b/(2*3))*(h/3) = 32 m^2
Trib_flanges := h*2/3*(b*2/3)*(bw*2 + o)*2/(hw*2 + 2*(bw*2 + o))*1/2 = 64 m^2
Trib_web := h*2/3*(b*2/3)*(hw*2/(hw*2 + 2*(bw*2 + o))*1/2) = 64 m^2
check := Trib_flanges*2 + Trib_web*2 + 4*Trib_cornercol + 8*Trib_middlecol - b*h = 0 m^2
# Volume of components
# Volume of each component required for self weight calculation
Vol_wall1 := (hw*tw + 2*tf*bw)*(H_1/2 + H_2_15/2) + 2*d_1*o*tf
Vol_wallb := (hw*tw + 2*tf*bw)*(H_1/2)
Vol_wall2_14 := H_2_15*(hw*tw + 2*tf*bw) + 2*d_2_15*o*tf
Vol_col2_15 := H_2_15*b_column^2
Vol_wall15 := H_2_15/2*(hw*tw + 2*tf*bw) + 2*d_2_15*o*tf
Vol_col1 := H_1*b_column^2
# Dead loads:
# First floor loads
DL_cornerColb := (Vol_col1/2)*load_density + Trib_cornercol*(load_SID + t_slab*load_density) = 130406 N
DL_middleColb := (Vol_col1/2)*load_density + Trib_middlecol*(load_SID + t_slab*load_density) = 243.206 kN
DL_wallb := (Vol_wallb*load_density + (Trib_flanges*2 + Trib_web*2)*(load_SID + t_slab*load_density))
DL_wallb/12 = 184350 N
# First floor loads
DL_cornerCol1 := (Vol_col1/2 + Vol_col2_15/2)*load_density + Trib_cornercol*(load_SID + t_slab*load_density) = 143655 N
DL_middleCol1 := (Vol_col1/2 + Vol_col2_15/2)*load_density + Trib_middlecol*(load_SID + t_slab*load_density) = 256.455 kN
DL_wall1 := (Vol_wall1*load_density + (Trib_flanges*2 + Trib_web*2)*(load_SID + t_slab*load_density))
DL_wall1/12 = 213.9 kN
# Second floor loads
DL_cornerCol2 := Vol_col2_15*load_density + Trib_cornercol*(load_SID + t_slab*load_density) = 139.299 kN
DL_middleCol2 := Vol_col2_15*load_density + Trib_middlecol*(load_SID + t_slab*load_density) = 252.099 kN
DL_wall2 := Vol_wall2_14*load_density + (Trib_flanges*2 + Trib_web*2)*(load_SID + t_slab*load_density)
DL_wall2/12 = 205.5 kN
# Roof loads
DL_cornerColr := (Vol_col2_15/2)*load_density + Trib_cornercol*(load_SID + t_slab*load_density) = 126.049 kN
DL_middleColr := (Vol_col2_15/2)*load_density + Trib_middlecol*(load_SID + t_slab*load_density) = 238.85 kN
DL_wallr := Vol_wall15*load_density + (Trib_flanges*2 + Trib_web*2)*(load_SID + t_slab*load_density)
DL_wallr/12 = 179.95 kN
# Live Loads
# Live loads determined by tributary area:
LL_cornerCol := Trib_cornercol*load_LL = 38.4 kN
LL_middleCol := Trib_middlecol*load_LL = 76.8 kN
LL_wall := ((Trib_flanges*2 + Trib_web*2)*load_LL) = 614.4 kN
LL_wall/12 = 51.2 kN
# Live load reduction factor, allows a reduction on live loads for components with lots of tributary area:
LL_red(B) := 0.3 + sqrt(9.8/(B/m^2))  # disabled  # NBCC 4.1.5.8
# Live load reduction on walls:
TribWalls := Trib_flanges*2 + Trib_web*2 = 256 m^2
nfloors := [1, 2, 3, 4, 5, 6, 7, 8, 9, 10, 11, 12, 13, 14, 15]
ones := [1, 1, 1, 1, 1, 1, 1, 1, 1, 1, 1, 1, 1, 1, 1]
B_walls := nfloors*TribWalls
LLR_wall := 0.3*transpose(ones) + sqrt(9.8/(transpose(B_walls)/m^2))
# Live load reduction on columns
# Corner columns:
B_cornercolumns := nfloors*Trib_cornercol
LLR_cornercolumns := 0.3*transpose(ones) + sqrt(9.8/(transpose(B_cornercolumns)/m^2))
# Middle columns:
B_middlecol := nfloors*Trib_cornercol
LLR_middlecol := 0.3*transpose(ones) + sqrt(9.8/(transpose(B_middlecol)/m^2))
# Comparing Gravity Load cases with CWDS:
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# * Note: For this comparison live load reduction was neglected.
# Total Building Seismic Weight
# Seismic weight is a representation of the mass that is used in the dynamic models and the base shear equations.
# SW = DL + 0.25(Snow load) + 0.6(Storage Loads) | NBCC 4.1.8.11.(4) commentary
# Total building seismic weight:
# Calculated:
W_seismic := (DL_cornerCol2*4 + DL_middleCol2*8 + DL_wall2)*13 + ((DL_cornerColb*4 + DL_middleColb*8 + DL_wallb) + (DL_cornerColr*4 + DL_middleColr*8 + DL_wallr) + (DL_cornerCol1*4 + DL_middleCol1*8 + DL_wall1)) = 79966.8 kN
# ETABS: | 79920 kN
# CWDS: | 79967 kN
# * Minor differances may be due to rounding errors in input
# Response Spectrum
# The response spectrum represents the seismic hazard based on the buildings soil condition and location (location to faults etc.). This building is assumed ot be located in downtown a Vancouver BC, site class C. The response spectrum values (Sa) can be obtrained from:
# http://earthquakescanada.nrcan.gc.ca/hazard-alea/interpolat/index_2010-eng.php
S_a0.2 := 0.94
S_a0.5 := 0.64
S_a1 := 0.333
S_a2 := 0.172
S_pga := 0.455
# According to the NBCC, the response spectrum values are adjusted to account for site class conditions, for site class C use the following conditions:
F_a := 1
F_v := 1
# Using the equations from NBCC 4.1.8.4 the values are adjusted:
T_g := [0; 0.2; 0.5; 1; 2; 4; 5]*s
S_g := [F_a*S_a0.2; F_a*S_a0.2; min(F_v*S_a0.5, F_a*S_a0.2); F_v*S_a1; F_v*S_a2; F_v*S_a2/2; F_v*S_a2/2] = [0.94; 0.94; 0.64; 0.333; 0.172; 0.086; 0.086]
# Final response sprectrum:
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# The NBCC gives an emperical formula to estimate the period of the structure. If the dynamic period is > than 2xNBCC use the NBCC estimate:
# NBCC emperical formula for period:
T_a := 0.05 s*((H_1 + 14*H_2_15)/m)^(3/4) = 1.02287 s
# The periods are also predicted using the dynamic procedure outline in the NBCC 2010. The next section shows the cracked model assumptions.
# Cracked Model ETABS
# The ETABS model uses frame elements for the columns and coupling beams and shell elements for the walls. Each floor is connected by a rigid diaphragm.
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# Coupling beams and columns are frame elements with the following properties:
# Coupling Beam:
I_CB := tf*d_1^3/12 = 0.0416667 m^4
A_CB := tf*d_1 = 0.5 m^2
# Column:
I_Col := b_column^4/12 = 0.00762552 m^4
A_Col := b_column^2 = 0.3025 m^2
# Walls are modelled as thick shells with thickness of:
tf = 0.5 m  # and
tw = 0.5 m
# For dynamic analysis, the section properties must be cracked. This is because concrete elements crack in earthquake and wind loads and therefore have different stiffness properties. Another eigenvalue must be completed for wind loads. According to the A23.3-14 the cracked values for EQ must be taken as:
# For diagonally reinforced coupling beams:
I_crCB := 0.25*I_CB
A_crCB := 0.45*A_CB
# For columns:
I_crCol := α_c*I_Col  # disabled
# =>
α_c := min(0.5 + 0.6*P_s/(f_pc*b_column^2), 1)  # disabled
# Where Ps is the axial load D+0.5L
# From Etabs, the cracked value were calculated for all columns. For simplicity the average value was used:
α_c := 0.69  # same value used for CWDS
# For walls, the area is cracked the same as the moment of inertia, therefore adjust the modulus of elasticity
E_crWall := α_w*E  # disabled
# Where:
α_w := min(max*(1 - 0.35*(R_d*R_o/γ_w - 1), 0.5), 1)  # disabled
# Where γw is the overstrength and can be taken
# as Ro
# The modulus of elasticity for reinforced concrete is:
E := 4500*sqrt(fpc/MPa)*MPa = 28460.5 MPa
# For East-West Direction Overstrength and ductility are (Assuming DOC > 0.66 - > check this):
R_dEW := 4
# and
R_oEW := 1.7
# Cracked value is:
α_wEW := min(max(1 - 0.35*(R_dEW - 1), 0.5), 1) = 0.5
# For North-South Direction Overstrength and ductility are:
R_dNS := 3.5
# and
R_oNS := 1.6
# Cracked value is:
α_wNS := min(max(1 - 0.35*(R_dNS - 1), 0.5), 1) = 0.5
# This value is an conservative. The CWDS uses an initial overstrength, designs the wall, checks the overstrength against the original value. This process is repeated until the cracking value gives a reasonably correct overstrength prediction. From this procedure, the CWDS gives a cracking value of:
α_wNS := 0.62  # disabled
# and
α_wEW := 0.62  # disabled
# Eigenvalue Analysis
# This section compares the modal analysis of both analysis methods.
# ETABS: Eigenvalue analysis
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T_1 := 1.607 s  # disabled
T_2 := 1.432 s  # disabled
T_3 := 1.122 s  # disabled
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# CWDS: Eigenvalue analysis
T_1 := 1.565 s  # disabled
T_2 := 1.446 s  # disabled
T_3 := 0.983 s  # disabled
# Locking each direction to obtain design period
# For the design periods only the directions being designed were considered. This involved locking the direction not being considered. These periods are presented below and compared.
T_ETABSx := 1.6 s
T_ETABSy := 1.41 s
T_CWDSx := 1.64 s
errorT_x := (1 - T_ETABSx/T_CWDSx) = 2.43902 %
T_CWDSy := 1.53 s
errorT_y := (1 - T_ETABSy/T_CWDSy) = 7.84314 %
# NBCC 2010 Base Shear
# East-west direction coupled direction
# East - West direction factors
T_EW := min(T_ETABSx, 2*T_a) = 1.6 s
# Factors from the NBCC
S_a0.2/S_a2 = 5.46512
# Therefore =>
M_vEW := linterp([1; 2]*s, [1; 1], T_EW) = 1
# Spectral acceleration
S_aEW := linterp(T_g, S_g, T_EW) = 0.2364
# Base shear from the NBCC
V_aEW := S_aEW*M_vEW*I_E*W_seismic/(R_oEW*R_dEW) = 2780.02 kN
V_maxEW := 2*S_g[1]*M_vEW*I_E*W_seismic/(3*(R_oEW*R_dEW)) = 7369.49 kN
V_minEW := M_vEW*S_g[6]*I_E*W_seismic/(R_oEW*R_dEW) = 1011.34 kN
V_EW := min(max(V_aEW, V_minEW), V_maxEW) = 2780.02 kN
# Base shear from ETABS:
# The base shear from ETABs is determined through combining the modes using the CQC method.
Fact_VeEW := min(1, 2/3*S_g[1]/linterp(T_g, S_g, T_EW)) = 1
V_etabsEW := 16382 kN
V_dEW := max(Fact_VeEW*V_etabsEW*I_E/(R_oEW*R_dEW), 0.8*V_EW) = 2409.12 kN
# Scaling factor:
SF_EW := V_dEW/V_etabsEW = 0.147059
# Compare with CWDS:
SF_EWCWDS := 0.1471
# North-South direction
# North - South direction factors
T_NS := min(T_ETABSy, 2*T_a)
# Factors from the NBCC
M_vNS := linterp([1; 2]*s, [1; 1.2], T_NS) = 1.082
# Spectral acceleration
S_aNS := linterp(T_g, S_g, T_NS) = 0.26699
# Base shear from the NBCC
V_aNS := S_aNS*M_vNS*I_E*W_seismic/(R_oNS*R_dNS) = 4125.19 kN
V_maxNS := 2*S_g[1]*M_vNS*I_E*W_seismic/(3*(R_oNS*R_dNS)) = 9682.45 kN
V_minNS := M_vNS*S_g[6]*I_E*W_seismic/(R_oNS*R_dNS) = 1328.76 kN
V_NS := min(max(V_aNS, V_minNS), V_maxNS) = 4125.19 kN
# Base shear from ETABS:
# The base shear from ETABs is determined through combining the modes using the CQC method.
Fact_VeNS := min(1, 2/3*S_g[1]/linterp(T_g, S_g, T_NS)) = 1
V_etabsNS := 19614 kN
V_dNS := max(Fact_VeNS*V_etabsNS*I_E/(R_oNS*R_dNS), 0.8*V_NS) = 3502.5 kN
# Scaling factor:
SF_NS := V_dNS/V_etabsNS = 0.178571
# Compare with CWDS:
SF_NSCWDS := 0.1786
# Interstory drift ratios (ISDR)
# Interstory drift ratio from both methods are completed by combining the modes with the CQC method.
ISDR_d := ISDR_CQC*R_d*R_o*SF/I_e  # disabled
# The following graphs compare the ETABS and CWDS for the E-W and N-S directions.
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# Displacements
# Interstory drift ratio from both methods are completed by combining the modes with the CQC method.
Δ_d := Δ_CQC*R_d*R_o*SF/I_e  # disabled
# The following graphs compare the ETABS and CWDS for the E-W and N-S directions.
# East-West Direction
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# Design forces
# Design forces for the wall and coupling beams require a series of scaling factors, including scaling to the design base shear, applying a factor to scale P-delta effects.
# PDelta
# The P-Delta factor is taken from paragraph 97 in the NBCC2010 Commentary J. The following factor will be used to amplified the design forces to account for the P-Delta effects.
F_pd := 1 + sum(DL_i, i = x .. n_f)/(R_o*sum(F_i, i = x .. n_f))*ISDR_d  # disabled
# Where sum(DL_i, i = x .. n_f) is the summation of the dead load above the story x and sum(F_i, i = x .. n_f) is the summation of all the shear forces above story level x. All design forces are to be multiplied by this factor.
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# Wall Forces
# The wall forces are compared on multiple levels Total Wall, Wall Channels, and the Web and Flanges. The forces for each of these components are used for different aspects of design. The following pictures show what each level of comparison means.
# Total Wall | Wall Channels | Web and Flanges
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# The forces compared are the final design forces for every floor. Therefore the final forces cinoared are:
# Coupled Shear forces
F_d := F_CQC*SF*F_pd  # disabled
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# Coupled Axial
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# Coupled Moments
# Degree of Coupling
# The minimum limit for coupling is 0.66:
DoC := T*d_w/(M_1 + M_2 + T*d_w)  # disabled
# Distance between centroids are:
d_w := 2*((2*(o/2 + bw/2)*bw*tf + (hw - 2*tf)*tw*(o/2 + bw - tf))/(2*bw*tf + (hw - 2*tf)*tw)) = 6.07692 m
# Max Moment in W1:
M_1 := 9629.6 kN*m
# Max Moment in W2:
M_2 := M_1
# Axial Load, P:
P_s := 8809 kN
# Degree of coupling beam:
DoC := P_s*d_w/(M_1 + M_2 + P_s*d_w) = 0.735417
# Degree of coupling is 73.5% which is greater than 66%, therefore the assumptions of Rd = 4 and Ro =1.7 is OK
# The CWDS degree of coupling is: 79%
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# Coupling Beam Demand
# Shear Demand
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# Shear demand is determined by the maximum shear forces in the flanges and the webs.
# Wind Analysis NBCC 4.1.7
# The cracked values for the earthquake case were assumed the same for the wind case.
# Wind demands were determined by using the dynamic procedure outlined by the NBCC
# Check to see if dynamic procedure is required.
H_tot = 55.95 m  # <  # 60m  # Dynamic procedure not required
H_tot/b = 2.33125  # <  # 4  # Dynamic procedure not required
f_n := 1/T_ETABSx = 0.625 1/s  # <  # 1 Hz  # Dynamic procedure required
# There are six different load cases to get the wind demands on the structure.
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# Need to know Pw and PL
# Importance factor, windload Table 4.1.7.1.
I_w := 1
SLS := 0.75
# Velocity pressure sentence (4):
q_50 := 0.45 kPa  # (1 in 50 years hourly wind pressure)
# Exposure factor, Ce (Par. 7,41-44):
C_e :=
    for i ∈ 0 .. 15
        C_e[i] ← min(max(0.5*(EL[i]/(12.7 m))^0.5, 0.5), 2.5)
    C_e
# Sentence (6) Internal gust effect, Cg (Par. 45-56):
# The gust effect factor, Cg, is obtained by:
C_g := 1 + g_p*σ_μ  # disabled
# The coefficient of variation, σ_μ, is determined by:
σ_μ := sqrt(K_r/C_eH*(B + s*F/β))  # disabled
# Exposure factor at the top of the building evaluated according to Paragraph 43:
C_eH := min(max(0.5*(H_tot/(12.7 m))^0.5, 0.5), 2.5) = 1.04947
# Surface factor, K, roughness coefficient of terrain, for rough exposure:
K_r := 0.1
# Background trubulance factor, Figure I -19:
B_EW := (4/3*integral((1/(1 + x*H_tot/m/457))*(1/(1 + x*h/m/122))*x/(1 + x^2)^(4/3), x = 0 .. 914 m/H_tot)) = 0.91623
B_NS := (4/3*integral((1/(1 + x*H_tot/m/457))*(1/(1 + x*b/m/122))*x/(1 + x^2)^(4/3), x = 0 .. 914 m/H_tot)) = 0.91623
# Mean wind speed:
V_H := 39.2*sqrt(I_w*q_50/kPa)*sqrt(C_eH)*m/s = 26.9387 m/s
# Size reduction factor:
s_EW := π/3*(1/(1 + 8*H_tot/(3*V_H*T_ETABSx)))*(1/(1 + 10*h/(V_H*T_ETABSx))) = 0.0357351
s_NS := π/3*(1/(1 + 8*H_tot/(3*V_H*T_ETABSy)))*(1/(1 + 10*b/(V_H*T_ETABSy))) = 0.0290357
# Gust energy ratio of wave number:
x_0EW := 1220 m/(T_ETABSx*V_H) = 28.305
x_0NS := 1220 m/(T_ETABSy*V_H) = 32.1192
F_EW := x_0EW^2/(1 + x_0EW^2)^(4/3) = 0.10749
F_NS := x_0NS^2/(1 + x_0NS^2)^(4/3) = 0.0988392
# Damping factor, β:
β := 0.015
# The coefficient of variation, σ_μ, is determined by:
σ_μ_EW := sqrt(K_r/C_eH*(B_EW + s_EW*F_EW/β)) = 0.334223
σ_μ_NS := sqrt(K_r/C_eH*(B_NS + s_NS*F_NS/β)) = 0.324862
# Peak factor as a function of average fluctuation rate:
ν_EW := 1/T_ETABSx*sqrt(s_EW*F_EW/(s_EW*F_EW + β*B_EW))
ν_NS := 1/T_ETABSy*sqrt(s_NS*F_NS/(s_EW*F_NS + β*B_NS))
g_pEW := sqrt(2*ln(ν_EW*3600*s)) + 0.577/sqrt(2*ln(ν_EW*3600*s))
g_pNS := sqrt(2*ln(ν_NS*3600*s)) + 0.577/sqrt(2*ln(ν_NS*3600*s))
# The gust factors are then:
C_gEW := 1 + g_pEW*σ_μ_EW
C_gNS := 1 + g_pNS*σ_μ_NS
# Local pressure coefficient, Cp (Par. 29):
# Windward pressure coefficient
C_pWindard :=
    C_Pw ← 0.6 if H_tot/h < 0.25
    C_Pw ← 0.27*(H_tot/h + 2) if 0.25 ≤ H_tot/h < 1
    C_Pw ← 0.8 if 1 ≤ H_tot/h
    C_Pw
    = 0.8
# Leeward pressure coefficient
C_pLeeward :=
    C_Pw ← -0.3 if H_tot/h < 0.25
    C_Pw ← -0.27*(H_tot/h + 0.88) if 0.25 ≤ H_tot/h < 1
    C_Pw ← -0.5 if 1 ≤ H_tot/h
    C_Pw
    = -0.5
TribH :=
    for ii ∈ 0 .. 15
        TH[ii] ← H_1/2 if ii < 1
        TH[ii] ← H_1/2 + H_2_15/2 if 0 < ii < 2
        TH[ii] ← H_2_15/2 if ii > 14
        TH[ii] ← H_2_15 otherwise
    TH
# External pressure distribution
# Windward pressure:
pe_wwES := I_w*q_50*C_pWindard*C_gEW*C_e
pe_wwNS := I_w*q_50*C_pWindard*C_gNS*C_e
# Leeward pressure:
pe_lwES := I_w*q_50*C_pLeeward*C_gEW*C_e
pe_lwNS := I_w*q_50*C_pLeeward*C_gNS*C_e
# The column loads inputed into ETABS are as follows:
# Apply loads at centroid of diaphragm
# Load Case: AX
AX_FX :=
    for ii ∈ 0 .. 15
        q[ii] ← TribH[ii]*pe_wwES[ii]*b - TribH[ii]*pe_lwES[ii]*b
    q
AX_FY := 0
AX_M := 0
# Load Case: AY
AY_FX := 0
AY_FY :=
    for ii ∈ 0 .. 15
        q[ii] ← TribH[ii]*pe_wwNS[ii]*b - TribH[ii]*pe_lwNS[ii]*b
    q
AY_M := 0
# Load Case: BX
BX_FX := AX_FX/2
BX_FY := 0
BX_M := BX_FX*b/4
# Load Case: BY
BY_FX := 0
BY_FY := AY_FY/2
BY_M := BY_FY*h/4
# Load Case: C
C_FX := 0.75*AX_FX
C_FY := 0.75*AY_FY
C_M := 0
# Load Case: D
D_FX := (0.75*AX_FX + 0.38*AX_FX)/2
D_FY := (0.75*AY_FY + 0.38*AY_FY)/2
D_M := (0.75*AX_FX - 0.38*AX_FX)*b/8 + (0.75*AY_FY - 0.38*AY_FY)*h/8
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# Corner Column Loads | Middle Column Loads
q_wwES :=
    for ii ∈ 0 .. 15
        q[ii] ← TribH[ii]*pe_wwES[ii]*b/6
    q
q_wwES :=
    for ii ∈ 0 .. 15
        q[ii] ← TribH[ii]*pe_wwES[ii]*b/3
    q
q_lwES :=
    for ii ∈ 0 .. 15
        q[ii] ← TribH[ii]*pe_lwES[ii]*b/3
    q
q_lwES :=
    for ii ∈ 0 .. 15
        q[ii] ← TribH[ii]*pe_lwES[ii]*b/6
    q
q_wwNS :=
    for ii ∈ 0 .. 15
        q[ii] ← TribH[ii]*pe_wwNS[ii]*b/6
    q
q_wwNS :=
    for ii ∈ 0 .. 15
        q[ii] ← TribH[ii]*pe_wwNS[ii]*b/3
    q
q_lwNS :=
    for ii ∈ 0 .. 15
        q[ii] ← TribH[ii]*pe_lwNS[ii]*b/6
    q
q_lwNS :=
    for ii ∈ 0 .. 15
        q[ii] ← TribH[ii]*pe_lwNS[ii]*b/3
    q
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# Need to determined when the wall is cracked and when it is uncracked. First determine the moment of inertia in both directions:
# Moment of inertia about East West Direction:
I_EW := ((hw - tf)^3*tw/12 + (bw + tw/2)*tf^3/12*2 + (bw + tw/2)*tf*(hw/2)^2*2)*2 = 139.292 m^4
# Moment of inertia about North South Direction:
I_NS := ((hw - tf)*tw^3/12 + (bw + tw/2)^3*tf/12*2 + (bw + tw/2)*tf*(o/2 + (bw/2 + tw/4))^2*2 + (hw - tf)*tw*(o/2 + bw)^2)*2 = 170.667 m^4
# Modulus of rupture of concrete is given in cl 8.6.4:
f_r := 0.6*λ*sqrt(fpc/MPa)*MPa = 3.79473 MPa
CENT := ((hw - tf)*tw^2/2 + (bw + tw/2)^2*tf)/(((hw - tf)*tw) + (bw + tw/2)*tf*2) = 0.888393 m
(bw + tw/2)/2 = 1.625 m
